// COMSOL Multiphysics 6.0.0.318 model "BRFGL1-126-1250-4_physics_baseline_Model.mph"
// Outline of the model tree
// Components: comp_v1 "组件 1", comp_v2 "组件 2", comp_v2_cad_solid_preview "组件"

Parameters
  Um = 126[kV]  // Highest voltage for equipment
  I0 = 1250[A]  // Rated current
  Vph_rms = 72.75[kV]  // S00 high-voltage screen RMS phase-to-ground voltage
  product_model = 1  // Selected model: BRFGL1-126/1250-4. BRFGL2 is not used for this geometry.
  L_total = 2245[mm]  // BRFGL1 overall axial length L
  L1_ext = 1150[mm]  // External insulation length L1
  oil_len = 595[mm]  // Oil immersed length L2
  air_len = 1650[mm]  // Air-side equivalent length L_total - oil_len
  L3_ct = 200[mm]  // CT length L3, stored as geometry metadata
  L4_flange = 200[mm]  // Flange connection length L4
  flange_t = 30[mm]  // Flange thickness H
  terminal_a1 = 40[mm]  // Air-side terminal connector dimension a1
  creepage_check = 3906[mm]  // Nominal creepage distance; check only, not axial length
  bolt_circle_D0 = 350[mm]  // Flange bolt circle D0; not explicitly modeled in 2D axisymmetry
  r_hollow = 20[mm]  // Conduit inner radius d3/2
  r_conductor_outer = 32[mm]  // Assumed conductor tube outer radius; keeps S00 at the conductor/RIP interface
  r_screen_start = 35[mm]  // S00 screen radius
  r_rip = 66[mm]  // Oil-side core radius D1/2; maximum condenser-screen radius limit
  r_body = 82[mm]  // Equivalent silicone rubber trunk radius
  r_housing = 135[mm]  // External insulation maximum radius D2/2
  r_terminal = 40[mm]  // Equivalent air-side terminal connector radius from a1
  r_oil_tip = 45[mm]  // Equivalent tapered oil-side shield tip radius
  r_flange = 200[mm]  // Flange outer radius D/2
  r_flange_neck = 100[mm]  // Equivalent grounded flange neck radius
  r_far = 360[mm]  // Surrounding air/oil far-field radius
  screen_th = 2[mm]  // Numerical thickness for explicit condenser-screen domains; coarsened for baseline meshing
  shed_pitch = 92[mm]  // Parametric V2 shed pitch
  shed_t = 16[mm]  // Parametric V2 shed axial thickness
  shed_start = 55[mm]  // First V2 shed start
  Rc0 = 1e-6[ohm]  // Nominal contact resistance
  Rc_factor = 1  // Contact resistance deterioration multiplier
  V_contact = pi*(r_conductor_outer^2-r_hollow^2)*terminal_a1  // Contact heat-source volume
  Q_contact_vol = I0^2*Rc0*Rc_factor/V_contact  // Volumetric heat source Q_contact = I^2*Rc0*Rc_factor/V_contact
  freq0 = 50[Hz]
  omega0 = 2*pi*freq0
  load_mult = 1
  Icase = I0*load_mult
  voltage_mult = 1
  Vcase = Vph_rms*voltage_mult
  Tair_case = 25[degC]
  Toil_case = 85[degC]
  wind_case = 1[m/s]
  h_air_case = 12[W/(m^2*K)] + 8[W/(m^2*K)]*(wind_case/(1[m/s]))^0.8
  h_oil_case = 300[W/(m^2*K)]
  sigma_cu_20 = 5.998e7[S/m]
  alpha_cu = 0.00393[1/K]
  epsr_rip = 4.2
  tan_delta_rip = 0.004
  sigma_rip = 7e-15[S/m]
  Qjoule_cu_ref = Icase^2*(1/sigma_cu_20)/(pi*(r_conductor_outer^2-r_hollow^2))^2
  Qdielectric_rip_ref = omega0*epsilon0_const*epsr_rip*tan_delta_rip*(Vcase/(r_rip-r_conductor_outer))^2

Selections
  v1_center_conductor: Box "框" [comp_v1]
    entitydim = 2
    xmin = r_hollow-0.2[mm]
    xmax = r_conductor_outer+0.2[mm]
    ymin = -oil_len-1[mm]
    ymax = air_len+1[mm]
  v1_inner_conduit_or_hollow_region: Box "框 2" [comp_v1]
    entitydim = 2
    xmin = -0.2[mm]
    xmax = r_hollow+0.2[mm]
    ymin = -oil_len-1[mm]
    ymax = air_len+1[mm]
  v1_rip_capacitor_core: Box "框 3" [comp_v1]
    entitydim = 2
    xmin = r_conductor_outer-0.2[mm]
    xmax = r_rip+0.2[mm]
    ymin = -oil_len-1[mm]
    ymax = L1_ext+1[mm]
  v1_condenser_screens: Box "框 4" [comp_v1]
    entitydim = 2
    xmin = r_screen_start-1[mm]
    xmax = 60[mm]
    ymin = -576[mm]
    ymax = 576[mm]
  v1_silicone_rubber_external_insulation: Box "框 5" [comp_v1]
    entitydim = 2
    xmin = r_rip-0.2[mm]
    xmax = r_body+0.2[mm]
    ymin = -1[mm]
    ymax = L1_ext+1[mm]
  v1_air_side_sheds_or_equivalent_envelope: Box "框 6" [comp_v1]
    entitydim = 2
    xmin = r_body-0.2[mm]
    xmax = r_housing+0.2[mm]
    ymin = -1[mm]
    ymax = L1_ext+1[mm]
  v1_flange_grounded_metal: Box "框 7" [comp_v1]
    entitydim = 2
    xmin = r_rip-0.2[mm]
    xmax = r_flange+0.2[mm]
    ymin = -L4_flange/2-1[mm]
    ymax = L4_flange/2+1[mm]
  v1_oil_side_core: Box "框 8" [comp_v1]
    entitydim = 2
    xmin = r_conductor_outer-0.2[mm]
    xmax = r_rip+0.2[mm]
    ymin = -oil_len-1[mm]
    ymax = 1[mm]
  v1_oil_side_shield_or_tapered_region: Box "框 9" [comp_v1]
    entitydim = 2
    xmin = r_oil_tip-0.2[mm]
    xmax = r_rip+0.2[mm]
    ymin = -oil_len-1[mm]
    ymax = -100[mm]
  v1_terminal_connector_region: Box "框 10" [comp_v1]
    entitydim = 2
    xmin = -0.2[mm]
    xmax = r_terminal+0.2[mm]
    ymin = L1_ext-1[mm]
    ymax = L1_ext+terminal_a1+1[mm]
  v1_contact_resistance_heat_source_layer: Box "框 11" [comp_v1]
    entitydim = 2
    xmin = r_hollow-0.2[mm]
    xmax = r_conductor_outer+0.2[mm]
    ymin = L1_ext-1[mm]
    ymax = L1_ext+terminal_a1+1[mm]
  v1_surrounding_air_domain: Box "框 12" [comp_v1]
    entitydim = 2
    xmin = r_terminal-1[mm]
    xmax = r_far+1[mm]
    ymin = -1[mm]
    ymax = air_len+1[mm]
  v1_surrounding_oil_domain: Box "框 13" [comp_v1]
    entitydim = 2
    xmin = r_rip-1[mm]
    xmax = r_far+1[mm]
    ymin = -oil_len-1[mm]
    ymax = 1[mm]
  v1_center_conductor_joule_lower: Box "框 14" [comp_v1]
    entitydim = 2
    xmin = r_hollow-0.1[mm]
    xmax = r_conductor_outer+0.1[mm]
    ymin = -oil_len-1[mm]
    ymax = L1_ext-1[mm]
  v1_center_conductor_joule_upper: Box "框 15" [comp_v1]
    entitydim = 2
    xmin = r_hollow-0.1[mm]
    xmax = r_conductor_outer+0.1[mm]
    ymin = L1_ext+terminal_a1+1[mm]
    ymax = air_len+1[mm]
  v1_contact_resistance_heat_source_layer_strict: Box "框 16" [comp_v1]
    entitydim = 2
    xmin = r_hollow-0.1[mm]
    xmax = r_conductor_outer+0.1[mm]
    ymin = L1_ext+0.1[mm]
    ymax = L1_ext+terminal_a1-0.1[mm]
  v1_rip_capacitor_core_strict: Box "框 17" [comp_v1]
    entitydim = 2
    xmin = r_conductor_outer+0.1[mm]
    xmax = r_rip-0.1[mm]
    ymin = -oil_len+1[mm]
    ymax = L1_ext-1[mm]
  v1_silicone_rubber_external_insulation_strict: Box "框 18" [comp_v1]
    entitydim = 2
    xmin = r_rip+0.1[mm]
    xmax = r_body-0.1[mm]
    ymin = L4_flange/2+1[mm]
    ymax = L1_ext-1[mm]
  v1_flange_grounded_metal_strict: Box "框 19" [comp_v1]
    entitydim = 2
    xmin = r_rip+0.1[mm]
    xmax = r_flange-0.1[mm]
    ymin = -L4_flange/2+1[mm]
    ymax = L4_flange/2-1[mm]
  v1_screen_S00: Box "框 20" [comp_v1]
    entitydim = 2
    xmin = 34.7[mm]
    xmax = 37.3[mm]
    ymin = -576.0[mm]
    ymax = 576.0[mm]
  v1_bnd_screen_S00_floating: Box "框 21" [comp_v1]
    entitydim = 1
    xmin = 34.8[mm]
    xmax = 35.2[mm]
    ymin = -576.0[mm]
    ymax = 576.0[mm]
  v1_screen_S01: Box "框 1" [comp_v1]
    entitydim = 2
    xmin = 36.95[mm]
    xmax = 39.55[mm]
    ymin = -576.0[mm]
    ymax = 576.0[mm]
  v1_bnd_screen_S01_floating: Box "框 22" [comp_v1]
    entitydim = 1
    xmin = 37.05[mm]
    xmax = 37.45[mm]
    ymin = -576.0[mm]
    ymax = 576.0[mm]
  v1_screen_S02: Box "框 2a" [comp_v1]
    entitydim = 2
    xmin = 39.2[mm]
    xmax = 41.8[mm]
    ymin = -576.0[mm]
    ymax = 576.0[mm]
  v1_bnd_screen_S02_floating: Box "框 23" [comp_v1]
    entitydim = 1
    xmin = 39.3[mm]
    xmax = 39.7[mm]
    ymin = -576.0[mm]
    ymax = 576.0[mm]
  v1_screen_S03: Box "框 3a" [comp_v1]
    entitydim = 2
    xmin = 41.45[mm]
    xmax = 44.05[mm]
    ymin = -576.0[mm]
    ymax = 576.0[mm]
  v1_bnd_screen_S03_floating: Box "框 24" [comp_v1]
    entitydim = 1
    xmin = 41.55[mm]
    xmax = 41.95[mm]
    ymin = -576.0[mm]
    ymax = 576.0[mm]
  v1_screen_S04: Box "框 4a" [comp_v1]
    entitydim = 2
    xmin = 43.7[mm]
    xmax = 46.3[mm]
    ymin = -576.0[mm]
    ymax = 576.0[mm]
  v1_bnd_screen_S04_floating: Box "框 25" [comp_v1]
    entitydim = 1
    xmin = 43.8[mm]
    xmax = 44.2[mm]
    ymin = -576.0[mm]
    ymax = 576.0[mm]
  v1_screen_S05: Box "框 5a" [comp_v1]
    entitydim = 2
    xmin = 45.95[mm]
    xmax = 48.55[mm]
    ymin = -551.0[mm]
    ymax = 551.0[mm]
  v1_bnd_screen_S05_floating: Box "框 26" [comp_v1]
    entitydim = 1
    xmin = 46.05[mm]
    xmax = 46.45[mm]
    ymin = -551.0[mm]
    ymax = 551.0[mm]
  v1_screen_S06: Box "框 6a" [comp_v1]
    entitydim = 2
    xmin = 48.2[mm]
    xmax = 50.8[mm]
    ymin = -506.0[mm]
    ymax = 506.0[mm]
  v1_bnd_screen_S06_floating: Box "框 27" [comp_v1]
    entitydim = 1
    xmin = 48.3[mm]
    xmax = 48.7[mm]
    ymin = -506.0[mm]
    ymax = 506.0[mm]
  v1_screen_S07: Box "框 7a" [comp_v1]
    entitydim = 2
    xmin = 50.45[mm]
    xmax = 53.05[mm]
    ymin = -461.0[mm]
    ymax = 461.0[mm]
  v1_bnd_screen_S07_floating: Box "框 28" [comp_v1]
    entitydim = 1
    xmin = 50.55[mm]
    xmax = 50.95[mm]
    ymin = -461.0[mm]
    ymax = 461.0[mm]
  v1_screen_S08: Box "框 8a" [comp_v1]
    entitydim = 2
    xmin = 52.7[mm]
    xmax = 55.3[mm]
    ymin = -416.0[mm]
    ymax = 416.0[mm]
  v1_bnd_screen_S08_floating: Box "框 29" [comp_v1]
    entitydim = 1
    xmin = 52.8[mm]
    xmax = 53.2[mm]
    ymin = -416.0[mm]
    ymax = 416.0[mm]
  v1_screen_S09: Box "框 9a" [comp_v1]
    entitydim = 2
    xmin = 54.95[mm]
    xmax = 57.55[mm]
    ymin = -371.0[mm]
    ymax = 371.0[mm]
  v1_bnd_screen_S09_floating: Box "框 30" [comp_v1]
    entitydim = 1
    xmin = 55.05[mm]
    xmax = 55.45[mm]
    ymin = -371.0[mm]
    ymax = 371.0[mm]
  v1_screen_S10: Box "框 10a" [comp_v1]
    entitydim = 2
    xmin = 57.2[mm]
    xmax = 59.8[mm]
    ymin = -326.0[mm]
    ymax = 326.0[mm]
  v1_bnd_screen_S10_floating: Box "框 31" [comp_v1]
    entitydim = 1
    xmin = 57.3[mm]
    xmax = 57.7[mm]
    ymin = -326.0[mm]
    ymax = 326.0[mm]
  v1_bnd_axisymmetry: Box "框 32" [comp_v1]
    entitydim = 1
    xmin = -0.1[mm]
    xmax = 0.1[mm]
    ymin = -oil_len-1[mm]
    ymax = air_len+1[mm]
  v1_bnd_S00_fixed_72p75kV_rms: Box "框 33" [comp_v1]
    entitydim = 1
    xmin = 34.8[mm]
    xmax = 35.2[mm]
    ymin = -575[mm]
    ymax = 575[mm]
  v1_bnd_S10_ground_0V: Box "框 34" [comp_v1]
    entitydim = 1
    xmin = 57.3[mm]
    xmax = 57.7[mm]
    ymin = -326[mm]
    ymax = 326[mm]
  v1_bnd_flange_ground: Box "框 35" [comp_v1]
    entitydim = 1
    xmin = r_rip-0.2[mm]
    xmax = r_flange+0.2[mm]
    ymin = -L4_flange/2-1[mm]
    ymax = L4_flange/2+1[mm]
  v1_bnd_air_external_convection: Box "框 36" [comp_v1]
    entitydim = 1
    xmin = r_body-1[mm]
    xmax = r_housing+1[mm]
    ymin = -1[mm]
    ymax = L1_ext+1[mm]
  v1_bnd_surrounding_air_outer: Box "框 37" [comp_v1]
    entitydim = 1
    xmin = r_far-0.2[mm]
    xmax = r_far+0.2[mm]
    ymin = -1[mm]
    ymax = air_len+1[mm]
  v1_bnd_surrounding_oil_outer: Box "框 38" [comp_v1]
    entitydim = 1
    xmin = r_far-0.2[mm]
    xmax = r_far+0.2[mm]
    ymin = -oil_len-1[mm]
    ymax = 1[mm]
  v1_bnd_oil_immersed_surface: Box "框 39" [comp_v1]
    entitydim = 1
    xmin = r_oil_tip-1[mm]
    xmax = r_rip+1[mm]
    ymin = -oil_len-1[mm]
    ymax = 1[mm]
  v1_thermal_solid_domains: Box "框 40" [comp_v1]
    entitydim = 2
    xmin = r_hollow-0.1[mm]
    xmax = r_flange+0.1[mm]
    ymin = -oil_len-1[mm]
    ymax = air_len+1[mm]
    condition = inside
  v1_surrounding_air_main_domain: Box "框 41" [comp_v1]
    entitydim = 2
    xmin = r_housing-0.1[mm]
    xmax = r_far+1[mm]
    ymin = flange_t/2-0.1[mm]
    ymax = L1_ext+1[mm]
    condition = inside
  v1_surrounding_air_terminal_domain: Box "框 42" [comp_v1]
    entitydim = 2
    xmin = r_terminal-0.1[mm]
    xmax = r_far+1[mm]
    ymin = L1_ext-0.1[mm]
    ymax = air_len+1[mm]
    condition = inside
  v1_surrounding_oil_main_domain: Box "框 43" [comp_v1]
    entitydim = 2
    xmin = r_rip-0.1[mm]
    xmax = r_far+1[mm]
    ymin = -oil_len-1[mm]
    ymax = -L4_flange/2+0.1[mm]
    condition = inside
  v1_surrounding_oil_near_flange_domain: Box "框 44" [comp_v1]
    entitydim = 2
    xmin = r_flange-0.1[mm]
    xmax = r_far+1[mm]
    ymin = -L4_flange/2-0.1[mm]
    ymax = L4_flange/2+0.1[mm]
    condition = inside
  v2_center_conductor: Box "框 45" [comp_v2]
    entitydim = 2
    xmin = r_hollow-0.2[mm]
    xmax = r_conductor_outer+0.2[mm]
    ymin = -oil_len-1[mm]
    ymax = air_len+1[mm]
  v2_inner_conduit_or_hollow_region: Box "框 46" [comp_v2]
    entitydim = 2
    xmin = -0.2[mm]
    xmax = r_hollow+0.2[mm]
    ymin = -oil_len-1[mm]
    ymax = air_len+1[mm]
  v2_rip_capacitor_core: Box "框 47" [comp_v2]
    entitydim = 2
    xmin = r_conductor_outer-0.2[mm]
    xmax = r_rip+0.2[mm]
    ymin = -oil_len-1[mm]
    ymax = L1_ext+1[mm]
  v2_condenser_screens: Box "框 48" [comp_v2]
    entitydim = 2
    xmin = r_screen_start-1[mm]
    xmax = 60[mm]
    ymin = -576[mm]
    ymax = 576[mm]
  v2_silicone_rubber_external_insulation: Box "框 49" [comp_v2]
    entitydim = 2
    xmin = r_rip-0.2[mm]
    xmax = r_body+0.2[mm]
    ymin = -1[mm]
    ymax = L1_ext+1[mm]
  v2_air_side_sheds_or_equivalent_envelope: Box "框 50" [comp_v2]
    entitydim = 2
    xmin = r_body-0.2[mm]
    xmax = r_housing+0.2[mm]
    ymin = -1[mm]
    ymax = L1_ext+1[mm]
  v2_flange_grounded_metal: Box "框 51" [comp_v2]
    entitydim = 2
    xmin = r_rip-0.2[mm]
    xmax = r_flange+0.2[mm]
    ymin = -L4_flange/2-1[mm]
    ymax = L4_flange/2+1[mm]
  v2_oil_side_core: Box "框 52" [comp_v2]
    entitydim = 2
    xmin = r_conductor_outer-0.2[mm]
    xmax = r_rip+0.2[mm]
    ymin = -oil_len-1[mm]
    ymax = 1[mm]
  v2_oil_side_shield_or_tapered_region: Box "框 53" [comp_v2]
    entitydim = 2
    xmin = r_oil_tip-0.2[mm]
    xmax = r_rip+0.2[mm]
    ymin = -oil_len-1[mm]
    ymax = -100[mm]
  v2_terminal_connector_region: Box "框 54" [comp_v2]
    entitydim = 2
    xmin = -0.2[mm]
    xmax = r_terminal+0.2[mm]
    ymin = L1_ext-1[mm]
    ymax = L1_ext+terminal_a1+1[mm]
  v2_contact_resistance_heat_source_layer: Box "框 55" [comp_v2]
    entitydim = 2
    xmin = r_hollow-0.2[mm]
    xmax = r_conductor_outer+0.2[mm]
    ymin = L1_ext-1[mm]
    ymax = L1_ext+terminal_a1+1[mm]
  v2_surrounding_air_domain: Box "框 56" [comp_v2]
    entitydim = 2
    xmin = r_terminal-1[mm]
    xmax = r_far+1[mm]
    ymin = -1[mm]
    ymax = air_len+1[mm]
  v2_surrounding_oil_domain: Box "框 57" [comp_v2]
    entitydim = 2
    xmin = r_rip-1[mm]
    xmax = r_far+1[mm]
    ymin = -oil_len-1[mm]
    ymax = 1[mm]
  v2_center_conductor_joule_lower: Box "框 58" [comp_v2]
    entitydim = 2
    xmin = r_hollow-0.1[mm]
    xmax = r_conductor_outer+0.1[mm]
    ymin = -oil_len-1[mm]
    ymax = L1_ext-1[mm]
  v2_center_conductor_joule_upper: Box "框 59" [comp_v2]
    entitydim = 2
    xmin = r_hollow-0.1[mm]
    xmax = r_conductor_outer+0.1[mm]
    ymin = L1_ext+terminal_a1+1[mm]
    ymax = air_len+1[mm]
  v2_contact_resistance_heat_source_layer_strict: Box "框 60" [comp_v2]
    entitydim = 2
    xmin = r_hollow-0.1[mm]
    xmax = r_conductor_outer+0.1[mm]
    ymin = L1_ext+0.1[mm]
    ymax = L1_ext+terminal_a1-0.1[mm]
  v2_rip_capacitor_core_strict: Box "框 61" [comp_v2]
    entitydim = 2
    xmin = r_conductor_outer+0.1[mm]
    xmax = r_rip-0.1[mm]
    ymin = -oil_len+1[mm]
    ymax = L1_ext-1[mm]
  v2_silicone_rubber_external_insulation_strict: Box "框 62" [comp_v2]
    entitydim = 2
    xmin = r_rip+0.1[mm]
    xmax = r_body-0.1[mm]
    ymin = L4_flange/2+1[mm]
    ymax = L1_ext-1[mm]
  v2_flange_grounded_metal_strict: Box "框 63" [comp_v2]
    entitydim = 2
    xmin = r_rip+0.1[mm]
    xmax = r_flange-0.1[mm]
    ymin = -L4_flange/2+1[mm]
    ymax = L4_flange/2-1[mm]
  v2_screen_S00: Box "框 64" [comp_v2]
    entitydim = 2
    xmin = 34.7[mm]
    xmax = 37.3[mm]
    ymin = -576.0[mm]
    ymax = 576.0[mm]
  v2_bnd_screen_S00_floating: Box "框 65" [comp_v2]
    entitydim = 1
    xmin = 34.8[mm]
    xmax = 35.2[mm]
    ymin = -576.0[mm]
    ymax = 576.0[mm]
  v2_screen_S01: Box "框 1a" [comp_v2]
    entitydim = 2
    xmin = 36.95[mm]
    xmax = 39.55[mm]
    ymin = -576.0[mm]
    ymax = 576.0[mm]
  v2_bnd_screen_S01_floating: Box "框 66" [comp_v2]
    entitydim = 1
    xmin = 37.05[mm]
    xmax = 37.45[mm]
    ymin = -576.0[mm]
    ymax = 576.0[mm]
  v2_screen_S02: Box "框 2b" [comp_v2]
    entitydim = 2
    xmin = 39.2[mm]
    xmax = 41.8[mm]
    ymin = -576.0[mm]
    ymax = 576.0[mm]
  v2_bnd_screen_S02_floating: Box "框 67" [comp_v2]
    entitydim = 1
    xmin = 39.3[mm]
    xmax = 39.7[mm]
    ymin = -576.0[mm]
    ymax = 576.0[mm]
  v2_screen_S03: Box "框 3b" [comp_v2]
    entitydim = 2
    xmin = 41.45[mm]
    xmax = 44.05[mm]
    ymin = -576.0[mm]
    ymax = 576.0[mm]
  v2_bnd_screen_S03_floating: Box "框 68" [comp_v2]
    entitydim = 1
    xmin = 41.55[mm]
    xmax = 41.95[mm]
    ymin = -576.0[mm]
    ymax = 576.0[mm]
  v2_screen_S04: Box "框 4b" [comp_v2]
    entitydim = 2
    xmin = 43.7[mm]
    xmax = 46.3[mm]
    ymin = -576.0[mm]
    ymax = 576.0[mm]
  v2_bnd_screen_S04_floating: Box "框 69" [comp_v2]
    entitydim = 1
    xmin = 43.8[mm]
    xmax = 44.2[mm]
    ymin = -576.0[mm]
    ymax = 576.0[mm]
  v2_screen_S05: Box "框 5b" [comp_v2]
    entitydim = 2
    xmin = 45.95[mm]
    xmax = 48.55[mm]
    ymin = -551.0[mm]
    ymax = 551.0[mm]
  v2_bnd_screen_S05_floating: Box "框 70" [comp_v2]
    entitydim = 1
    xmin = 46.05[mm]
    xmax = 46.45[mm]
    ymin = -551.0[mm]
    ymax = 551.0[mm]
  v2_screen_S06: Box "框 6b" [comp_v2]
    entitydim = 2
    xmin = 48.2[mm]
    xmax = 50.8[mm]
    ymin = -506.0[mm]
    ymax = 506.0[mm]
  v2_bnd_screen_S06_floating: Box "框 71" [comp_v2]
    entitydim = 1
    xmin = 48.3[mm]
    xmax = 48.7[mm]
    ymin = -506.0[mm]
    ymax = 506.0[mm]
  v2_screen_S07: Box "框 7b" [comp_v2]
    entitydim = 2
    xmin = 50.45[mm]
    xmax = 53.05[mm]
    ymin = -461.0[mm]
    ymax = 461.0[mm]
  v2_bnd_screen_S07_floating: Box "框 72" [comp_v2]
    entitydim = 1
    xmin = 50.55[mm]
    xmax = 50.95[mm]
    ymin = -461.0[mm]
    ymax = 461.0[mm]
  v2_screen_S08: Box "框 8b" [comp_v2]
    entitydim = 2
    xmin = 52.7[mm]
    xmax = 55.3[mm]
    ymin = -416.0[mm]
    ymax = 416.0[mm]
  v2_bnd_screen_S08_floating: Box "框 73" [comp_v2]
    entitydim = 1
    xmin = 52.8[mm]
    xmax = 53.2[mm]
    ymin = -416.0[mm]
    ymax = 416.0[mm]
  v2_screen_S09: Box "框 9b" [comp_v2]
    entitydim = 2
    xmin = 54.95[mm]
    xmax = 57.55[mm]
    ymin = -371.0[mm]
    ymax = 371.0[mm]
  v2_bnd_screen_S09_floating: Box "框 74" [comp_v2]
    entitydim = 1
    xmin = 55.05[mm]
    xmax = 55.45[mm]
    ymin = -371.0[mm]
    ymax = 371.0[mm]
  v2_screen_S10: Box "框 10b" [comp_v2]
    entitydim = 2
    xmin = 57.2[mm]
    xmax = 59.8[mm]
    ymin = -326.0[mm]
    ymax = 326.0[mm]
  v2_bnd_screen_S10_floating: Box "框 75" [comp_v2]
    entitydim = 1
    xmin = 57.3[mm]
    xmax = 57.7[mm]
    ymin = -326.0[mm]
    ymax = 326.0[mm]
  v2_bnd_axisymmetry: Box "框 76" [comp_v2]
    entitydim = 1
    xmin = -0.1[mm]
    xmax = 0.1[mm]
    ymin = -oil_len-1[mm]
    ymax = air_len+1[mm]
  v2_bnd_S00_fixed_72p75kV_rms: Box "框 77" [comp_v2]
    entitydim = 1
    xmin = 34.8[mm]
    xmax = 35.2[mm]
    ymin = -575[mm]
    ymax = 575[mm]
  v2_bnd_S10_ground_0V: Box "框 78" [comp_v2]
    entitydim = 1
    xmin = 57.3[mm]
    xmax = 57.7[mm]
    ymin = -326[mm]
    ymax = 326[mm]
  v2_bnd_flange_ground: Box "框 79" [comp_v2]
    entitydim = 1
    xmin = r_rip-0.2[mm]
    xmax = r_flange+0.2[mm]
    ymin = -L4_flange/2-1[mm]
    ymax = L4_flange/2+1[mm]
  v2_bnd_air_external_convection: Box "框 80" [comp_v2]
    entitydim = 1
    xmin = r_body-1[mm]
    xmax = r_housing+1[mm]
    ymin = -1[mm]
    ymax = L1_ext+1[mm]
  v2_bnd_surrounding_air_outer: Box "框 81" [comp_v2]
    entitydim = 1
    xmin = r_far-0.2[mm]
    xmax = r_far+0.2[mm]
    ymin = -1[mm]
    ymax = air_len+1[mm]
  v2_bnd_surrounding_oil_outer: Box "框 82" [comp_v2]
    entitydim = 1
    xmin = r_far-0.2[mm]
    xmax = r_far+0.2[mm]
    ymin = -oil_len-1[mm]
    ymax = 1[mm]
  v2_bnd_oil_immersed_surface: Box "框 83" [comp_v2]
    entitydim = 1
    xmin = r_oil_tip-1[mm]
    xmax = r_rip+1[mm]
    ymin = -oil_len-1[mm]
    ymax = 1[mm]
  v2_bnd_air_convection_seg_000: Box "框 84" [comp_v2]
    entitydim = 1
    xmin = 110.481[mm]
    xmax = 110.581[mm]
    ymin = 100.02[mm]
    ymax = 111.786[mm]
  v2_bnd_air_convection_seg_001: Box "框 1b" [comp_v2]
    entitydim = 1
    xmin = 121.45[mm]
    xmax = 121.55[mm]
    ymin = 111.826[mm]
    ymax = 127.758[mm]
  v2_bnd_air_convection_seg_002: Box "框 2c" [comp_v2]
    entitydim = 1
    xmin = 121.45[mm]
    xmax = 121.55[mm]
    ymin = 127.798[mm]
    ymax = 143.73[mm]
  v2_bnd_air_convection_seg_003: Box "框 3c" [comp_v2]
    entitydim = 1
    xmin = 121.45[mm]
    xmax = 121.55[mm]
    ymin = 143.77[mm]
    ymax = 159.702[mm]
  v2_bnd_air_convection_seg_004: Box "框 4c" [comp_v2]
    entitydim = 1
    xmin = 121.45[mm]
    xmax = 121.55[mm]
    ymin = 159.742[mm]
    ymax = 175.674[mm]
  v2_bnd_air_convection_seg_005: Box "框 5c" [comp_v2]
    entitydim = 1
    xmin = 121.45[mm]
    xmax = 121.55[mm]
    ymin = 175.714[mm]
    ymax = 191.647[mm]
  v2_bnd_air_convection_seg_006: Box "框 6c" [comp_v2]
    entitydim = 1
    xmin = 121.45[mm]
    xmax = 121.55[mm]
    ymin = 191.687[mm]
    ymax = 207.619[mm]
  v2_bnd_air_convection_seg_007: Box "框 7c" [comp_v2]
    entitydim = 1
    xmin = 109.484[mm]
    xmax = 109.584[mm]
    ymin = 207.659[mm]
    ymax = 223.591[mm]
  v2_bnd_air_convection_seg_008: Box "框 8c" [comp_v2]
    entitydim = 1
    xmin = 91.995[mm]
    xmax = 92.095[mm]
    ymin = 223.631[mm]
    ymax = 239.563[mm]
  v2_bnd_air_convection_seg_009: Box "框 9c" [comp_v2]
    entitydim = 1
    xmin = 134.95[mm]
    xmax = 135.05[mm]
    ymin = 239.603[mm]
    ymax = 255.536[mm]
  v2_bnd_air_convection_seg_010: Box "框 10c" [comp_v2]
    entitydim = 1
    xmin = 126.642[mm]
    xmax = 126.742[mm]
    ymin = 255.576[mm]
    ymax = 271.508[mm]
  v2_bnd_air_convection_seg_011: Box "框 11a" [comp_v2]
    entitydim = 1
    xmin = 94.45[mm]
    xmax = 94.55[mm]
    ymin = 271.548[mm]
    ymax = 287.48[mm]
  v2_bnd_air_convection_seg_012: Box "框 12a" [comp_v2]
    entitydim = 1
    xmin = 114.7[mm]
    xmax = 114.8[mm]
    ymin = 287.52[mm]
    ymax = 303.452[mm]
  v2_bnd_air_convection_seg_013: Box "框 13a" [comp_v2]
    entitydim = 1
    xmin = 100.989[mm]
    xmax = 101.089[mm]
    ymin = 303.492[mm]
    ymax = 319.424[mm]
  v2_bnd_air_convection_seg_014: Box "框 14a" [comp_v2]
    entitydim = 1
    xmin = 134.95[mm]
    xmax = 135.05[mm]
    ymin = 319.464[mm]
    ymax = 335.397[mm]
  v2_bnd_air_convection_seg_015: Box "框 15a" [comp_v2]
    entitydim = 1
    xmin = 128.719[mm]
    xmax = 128.819[mm]
    ymin = 335.437[mm]
    ymax = 351.369[mm]
  v2_bnd_air_convection_seg_016: Box "框 16a" [comp_v2]
    entitydim = 1
    xmin = 96.527[mm]
    xmax = 96.627[mm]
    ymin = 351.409[mm]
    ymax = 367.341[mm]
  v2_bnd_air_convection_seg_017: Box "框 17a" [comp_v2]
    entitydim = 1
    xmin = 114.7[mm]
    xmax = 114.8[mm]
    ymin = 367.381[mm]
    ymax = 383.313[mm]
  v2_bnd_air_convection_seg_018: Box "框 18a" [comp_v2]
    entitydim = 1
    xmin = 103.098[mm]
    xmax = 103.198[mm]
    ymin = 383.353[mm]
    ymax = 399.286[mm]
  v2_bnd_air_convection_seg_019: Box "框 19a" [comp_v2]
    entitydim = 1
    xmin = 134.95[mm]
    xmax = 135.05[mm]
    ymin = 399.326[mm]
    ymax = 415.258[mm]
  v2_bnd_air_convection_seg_020: Box "框 20a" [comp_v2]
    entitydim = 1
    xmin = 130.796[mm]
    xmax = 130.896[mm]
    ymin = 415.298[mm]
    ymax = 431.23[mm]
  v2_bnd_air_convection_seg_021: Box "框 21a" [comp_v2]
    entitydim = 1
    xmin = 98.604[mm]
    xmax = 98.704[mm]
    ymin = 431.27[mm]
    ymax = 447.202[mm]
  v2_bnd_air_convection_seg_022: Box "框 22a" [comp_v2]
    entitydim = 1
    xmin = 114.7[mm]
    xmax = 114.8[mm]
    ymin = 447.242[mm]
    ymax = 463.174[mm]
  v2_bnd_air_convection_seg_023: Box "框 23a" [comp_v2]
    entitydim = 1
    xmin = 105.208[mm]
    xmax = 105.308[mm]
    ymin = 463.214[mm]
    ymax = 479.147[mm]
  v2_bnd_air_convection_seg_024: Box "框 24a" [comp_v2]
    entitydim = 1
    xmin = 134.95[mm]
    xmax = 135.05[mm]
    ymin = 479.187[mm]
    ymax = 495.119[mm]
  v2_bnd_air_convection_seg_025: Box "框 25a" [comp_v2]
    entitydim = 1
    xmin = 132.873[mm]
    xmax = 132.973[mm]
    ymin = 495.159[mm]
    ymax = 511.091[mm]
  v2_bnd_air_convection_seg_026: Box "框 26a" [comp_v2]
    entitydim = 1
    xmin = 100.681[mm]
    xmax = 100.781[mm]
    ymin = 511.131[mm]
    ymax = 527.063[mm]
  v2_bnd_air_convection_seg_027: Box "框 27a" [comp_v2]
    entitydim = 1
    xmin = 114.7[mm]
    xmax = 114.8[mm]
    ymin = 527.103[mm]
    ymax = 543.0360000000001[mm]
  v2_bnd_air_convection_seg_028: Box "框 28a" [comp_v2]
    entitydim = 1
    xmin = 106.262[mm]
    xmax = 106.362[mm]
    ymin = 543.076[mm]
    ymax = 559.008[mm]
  v2_bnd_air_convection_seg_029: Box "框 29a" [comp_v2]
    entitydim = 1
    xmin = 134.95[mm]
    xmax = 135.05[mm]
    ymin = 559.048[mm]
    ymax = 574.98[mm]
  v2_bnd_air_convection_seg_030: Box "框 30a" [comp_v2]
    entitydim = 1
    xmin = 133.912[mm]
    xmax = 134.012[mm]
    ymin = 575.02[mm]
    ymax = 590.952[mm]
  v2_bnd_air_convection_seg_031: Box "框 31a" [comp_v2]
    entitydim = 1
    xmin = 102.758[mm]
    xmax = 102.858[mm]
    ymin = 590.992[mm]
    ymax = 606.924[mm]
  v2_bnd_air_convection_seg_032: Box "框 32a" [comp_v2]
    entitydim = 1
    xmin = 114.7[mm]
    xmax = 114.8[mm]
    ymin = 606.9639999999999[mm]
    ymax = 622.897[mm]
  v2_bnd_air_convection_seg_033: Box "框 33a" [comp_v2]
    entitydim = 1
    xmin = 108.372[mm]
    xmax = 108.472[mm]
    ymin = 622.937[mm]
    ymax = 638.869[mm]
  v2_bnd_air_convection_seg_034: Box "框 34a" [comp_v2]
    entitydim = 1
    xmin = 81.95[mm]
    xmax = 82.05[mm]
    ymin = 638.909[mm]
    ymax = 654.841[mm]
  v2_bnd_air_convection_seg_035: Box "框 35a" [comp_v2]
    entitydim = 1
    xmin = 134.95[mm]
    xmax = 135.05[mm]
    ymin = 654.881[mm]
    ymax = 670.813[mm]
  v2_bnd_air_convection_seg_036: Box "框 36a" [comp_v2]
    entitydim = 1
    xmin = 104.835[mm]
    xmax = 104.935[mm]
    ymin = 670.853[mm]
    ymax = 686.7860000000001[mm]
  v2_bnd_air_convection_seg_037: Box "框 37a" [comp_v2]
    entitydim = 1
    xmin = 114.7[mm]
    xmax = 114.8[mm]
    ymin = 686.826[mm]
    ymax = 702.758[mm]
  v2_bnd_air_convection_seg_038: Box "框 38a" [comp_v2]
    entitydim = 1
    xmin = 110.481[mm]
    xmax = 110.581[mm]
    ymin = 702.798[mm]
    ymax = 718.73[mm]
  v2_bnd_air_convection_seg_039: Box "框 39a" [comp_v2]
    entitydim = 1
    xmin = 81.95[mm]
    xmax = 82.05[mm]
    ymin = 718.77[mm]
    ymax = 734.702[mm]
  v2_bnd_air_convection_seg_040: Box "框 40a" [comp_v2]
    entitydim = 1
    xmin = 134.95[mm]
    xmax = 135.05[mm]
    ymin = 734.742[mm]
    ymax = 750.674[mm]
  v2_bnd_air_convection_seg_041: Box "框 41a" [comp_v2]
    entitydim = 1
    xmin = 106.912[mm]
    xmax = 107.012[mm]
    ymin = 750.7139999999999[mm]
    ymax = 766.647[mm]
  v2_bnd_air_convection_seg_042: Box "框 42a" [comp_v2]
    entitydim = 1
    xmin = 114.7[mm]
    xmax = 114.8[mm]
    ymin = 766.687[mm]
    ymax = 782.619[mm]
  v2_bnd_air_convection_seg_043: Box "框 43a" [comp_v2]
    entitydim = 1
    xmin = 112.591[mm]
    xmax = 112.691[mm]
    ymin = 782.659[mm]
    ymax = 798.591[mm]
  v2_bnd_air_convection_seg_044: Box "框 44a" [comp_v2]
    entitydim = 1
    xmin = 81.95[mm]
    xmax = 82.05[mm]
    ymin = 798.631[mm]
    ymax = 814.563[mm]
  v2_bnd_air_convection_seg_045: Box "框 45a" [comp_v2]
    entitydim = 1
    xmin = 134.95[mm]
    xmax = 135.05[mm]
    ymin = 814.603[mm]
    ymax = 830.5360000000001[mm]
  v2_bnd_air_convection_seg_046: Box "框 46a" [comp_v2]
    entitydim = 1
    xmin = 107.95[mm]
    xmax = 108.05[mm]
    ymin = 830.576[mm]
    ymax = 846.508[mm]
  v2_bnd_air_convection_seg_047: Box "框 47a" [comp_v2]
    entitydim = 1
    xmin = 81.95[mm]
    xmax = 82.05[mm]
    ymin = 846.548[mm]
    ymax = 862.48[mm]
  v2_bnd_air_convection_seg_048: Box "框 48a" [comp_v2]
    entitydim = 1
    xmin = 114.7[mm]
    xmax = 114.8[mm]
    ymin = 862.52[mm]
    ymax = 878.452[mm]
  v2_bnd_air_convection_seg_049: Box "框 49a" [comp_v2]
    entitydim = 1
    xmin = 84.114[mm]
    xmax = 84.214[mm]
    ymin = 878.492[mm]
    ymax = 894.424[mm]
  v2_bnd_air_convection_seg_050: Box "框 50a" [comp_v2]
    entitydim = 1
    xmin = 134.95[mm]
    xmax = 135.05[mm]
    ymin = 894.4639999999999[mm]
    ymax = 910.397[mm]
  v2_bnd_air_convection_seg_051: Box "框 51a" [comp_v2]
    entitydim = 1
    xmin = 110.027[mm]
    xmax = 110.127[mm]
    ymin = 910.437[mm]
    ymax = 926.369[mm]
  v2_bnd_air_convection_seg_052: Box "框 52a" [comp_v2]
    entitydim = 1
    xmin = 81.95[mm]
    xmax = 82.05[mm]
    ymin = 926.409[mm]
    ymax = 942.341[mm]
  v2_bnd_air_convection_seg_053: Box "框 53a" [comp_v2]
    entitydim = 1
    xmin = 114.7[mm]
    xmax = 114.8[mm]
    ymin = 942.381[mm]
    ymax = 958.313[mm]
  v2_bnd_air_convection_seg_054: Box "框 54a" [comp_v2]
    entitydim = 1
    xmin = 86.223[mm]
    xmax = 86.323[mm]
    ymin = 958.353[mm]
    ymax = 974.2860000000001[mm]
  v2_bnd_air_convection_seg_055: Box "框 55a" [comp_v2]
    entitydim = 1
    xmin = 134.95[mm]
    xmax = 135.05[mm]
    ymin = 974.326[mm]
    ymax = 990.258[mm]
  v2_bnd_air_convection_seg_056: Box "框 56a" [comp_v2]
    entitydim = 1
    xmin = 112.104[mm]
    xmax = 112.204[mm]
    ymin = 990.298[mm]
    ymax = 1006.23[mm]
  v2_bnd_air_convection_seg_057: Box "框 57a" [comp_v2]
    entitydim = 1
    xmin = 81.95[mm]
    xmax = 82.05[mm]
    ymin = 1006.27[mm]
    ymax = 1022.202[mm]
  v2_bnd_air_convection_seg_058: Box "框 58a" [comp_v2]
    entitydim = 1
    xmin = 114.7[mm]
    xmax = 114.8[mm]
    ymin = 1022.242[mm]
    ymax = 1038.174[mm]
  v2_bnd_air_convection_seg_059: Box "框 59a" [comp_v2]
    entitydim = 1
    xmin = 88.333[mm]
    xmax = 88.433[mm]
    ymin = 1038.214[mm]
    ymax = 1054.147[mm]
  v2_bnd_air_convection_seg_060: Box "框 60a" [comp_v2]
    entitydim = 1
    xmin = 91.995[mm]
    xmax = 92.095[mm]
    ymin = 1054.187[mm]
    ymax = 1070.119[mm]
  v2_bnd_air_convection_seg_061: Box "框 61a" [comp_v2]
    entitydim = 1
    xmin = 109.484[mm]
    xmax = 109.584[mm]
    ymin = 1070.1589999999999[mm]
    ymax = 1086.0910000000001[mm]
  v2_bnd_air_convection_seg_062: Box "框 62a" [comp_v2]
    entitydim = 1
    xmin = 121.45[mm]
    xmax = 121.55[mm]
    ymin = 1086.131[mm]
    ymax = 1102.063[mm]
  v2_bnd_air_convection_seg_063: Box "框 63a" [comp_v2]
    entitydim = 1
    xmin = 121.45[mm]
    xmax = 121.55[mm]
    ymin = 1102.103[mm]
    ymax = 1118.036[mm]
  v2_bnd_air_convection_seg_064: Box "框 64a" [comp_v2]
    entitydim = 1
    xmin = 121.45[mm]
    xmax = 121.55[mm]
    ymin = 1118.076[mm]
    ymax = 1134.008[mm]
  v2_bnd_air_convection_seg_065: Box "框 65a" [comp_v2]
    entitydim = 1
    xmin = 119.762[mm]
    xmax = 119.862[mm]
    ymin = 1134.048[mm]
    ymax = 1149.98[mm]
  v2_bnd_oil_convection_seg_000: Box "框 85" [comp_v2]
    entitydim = 1
    xmin = 39.55[mm]
    xmax = 39.65[mm]
    ymin = -594.98[mm]
    ymax = -578.492[mm]
  v2_bnd_oil_convection_seg_001: Box "框 1c" [comp_v2]
    entitydim = 1
    xmin = 39.55[mm]
    xmax = 39.65[mm]
    ymin = -578.452[mm]
    ymax = -561.9639999999999[mm]
  v2_bnd_oil_convection_seg_002: Box "框 2d" [comp_v2]
    entitydim = 1
    xmin = 39.55[mm]
    xmax = 39.65[mm]
    ymin = -561.924[mm]
    ymax = -545.437[mm]
  v2_bnd_oil_convection_seg_003: Box "框 3d" [comp_v2]
    entitydim = 1
    xmin = 39.55[mm]
    xmax = 39.65[mm]
    ymin = -545.397[mm]
    ymax = -528.909[mm]
  v2_bnd_oil_convection_seg_004: Box "框 4d" [comp_v2]
    entitydim = 1
    xmin = 39.55[mm]
    xmax = 39.65[mm]
    ymin = -528.869[mm]
    ymax = -512.381[mm]
  v2_bnd_oil_convection_seg_005: Box "框 5d" [comp_v2]
    entitydim = 1
    xmin = 39.55[mm]
    xmax = 39.65[mm]
    ymin = -512.341[mm]
    ymax = -495.853[mm]
  v2_bnd_oil_convection_seg_006: Box "框 6d" [comp_v2]
    entitydim = 1
    xmin = 41.456[mm]
    xmax = 41.556[mm]
    ymin = -495.813[mm]
    ymax = -479.326[mm]
  v2_bnd_oil_convection_seg_007: Box "框 7d" [comp_v2]
    entitydim = 1
    xmin = 44.138[mm]
    xmax = 44.238[mm]
    ymin = -479.286[mm]
    ymax = -462.798[mm]
  v2_bnd_oil_convection_seg_008: Box "框 8d" [comp_v2]
    entitydim = 1
    xmin = 46.75[mm]
    xmax = 46.85[mm]
    ymin = -462.758[mm]
    ymax = -446.27[mm]
  v2_bnd_oil_convection_seg_009: Box "框 9d" [comp_v2]
    entitydim = 1
    xmin = 49.432[mm]
    xmax = 49.532[mm]
    ymin = -446.23[mm]
    ymax = -429.742[mm]
  v2_bnd_oil_convection_seg_010: Box "框 10d" [comp_v2]
    entitydim = 1
    xmin = 52.115[mm]
    xmax = 52.215[mm]
    ymin = -429.702[mm]
    ymax = -413.214[mm]
  v2_bnd_oil_convection_seg_011: Box "框 11b" [comp_v2]
    entitydim = 1
    xmin = 54.797[mm]
    xmax = 54.897[mm]
    ymin = -413.174[mm]
    ymax = -396.687[mm]
  v2_bnd_oil_convection_seg_012: Box "框 12b" [comp_v2]
    entitydim = 1
    xmin = 57.409[mm]
    xmax = 57.509[mm]
    ymin = -396.647[mm]
    ymax = -380.159[mm]
  v2_bnd_oil_convection_seg_013: Box "框 13b" [comp_v2]
    entitydim = 1
    xmin = 60.091[mm]
    xmax = 60.191[mm]
    ymin = -380.119[mm]
    ymax = -363.631[mm]
  v2_bnd_oil_convection_seg_014: Box "框 14b" [comp_v2]
    entitydim = 1
    xmin = 62.774[mm]
    xmax = 62.874[mm]
    ymin = -363.591[mm]
    ymax = -347.103[mm]
  v2_bnd_oil_convection_seg_015: Box "框 15b" [comp_v2]
    entitydim = 1
    xmin = 65.456[mm]
    xmax = 65.556[mm]
    ymin = -347.063[mm]
    ymax = -330.576[mm]
  v2_bnd_oil_convection_seg_016: Box "框 16b" [comp_v2]
    entitydim = 1
    xmin = 65.95[mm]
    xmax = 66.05[mm]
    ymin = -330.536[mm]
    ymax = -314.048[mm]
  v2_bnd_oil_convection_seg_017: Box "框 17b" [comp_v2]
    entitydim = 1
    xmin = 65.95[mm]
    xmax = 66.05[mm]
    ymin = -314.008[mm]
    ymax = -297.52[mm]
  v2_bnd_oil_convection_seg_018: Box "框 18b" [comp_v2]
    entitydim = 1
    xmin = 65.95[mm]
    xmax = 66.05[mm]
    ymin = -297.48[mm]
    ymax = -280.992[mm]
  v2_bnd_oil_convection_seg_019: Box "框 19b" [comp_v2]
    entitydim = 1
    xmin = 65.95[mm]
    xmax = 66.05[mm]
    ymin = -280.952[mm]
    ymax = -264.464[mm]
  v2_bnd_oil_convection_seg_020: Box "框 20b" [comp_v2]
    entitydim = 1
    xmin = 65.95[mm]
    xmax = 66.05[mm]
    ymin = -264.424[mm]
    ymax = -247.937[mm]
  v2_bnd_oil_convection_seg_021: Box "框 21b" [comp_v2]
    entitydim = 1
    xmin = 65.95[mm]
    xmax = 66.05[mm]
    ymin = -247.897[mm]
    ymax = -231.409[mm]
  v2_bnd_oil_convection_seg_022: Box "框 22b" [comp_v2]
    entitydim = 1
    xmin = 65.95[mm]
    xmax = 66.05[mm]
    ymin = -231.369[mm]
    ymax = -214.881[mm]
  v2_bnd_oil_convection_seg_023: Box "框 23b" [comp_v2]
    entitydim = 1
    xmin = 65.95[mm]
    xmax = 66.05[mm]
    ymin = -214.841[mm]
    ymax = -198.353[mm]
  v2_bnd_oil_convection_seg_024: Box "框 24b" [comp_v2]
    entitydim = 1
    xmin = 65.95[mm]
    xmax = 66.05[mm]
    ymin = -198.313[mm]
    ymax = -181.826[mm]
  v2_bnd_oil_convection_seg_025: Box "框 25b" [comp_v2]
    entitydim = 1
    xmin = 65.95[mm]
    xmax = 66.05[mm]
    ymin = -181.786[mm]
    ymax = -165.298[mm]
  v2_bnd_oil_convection_seg_026: Box "框 26b" [comp_v2]
    entitydim = 1
    xmin = 65.95[mm]
    xmax = 66.05[mm]
    ymin = -165.258[mm]
    ymax = -148.77[mm]
  v2_bnd_oil_convection_seg_027: Box "框 27b" [comp_v2]
    entitydim = 1
    xmin = 65.95[mm]
    xmax = 66.05[mm]
    ymin = -148.73[mm]
    ymax = -132.242[mm]
  v2_bnd_oil_convection_seg_028: Box "框 28b" [comp_v2]
    entitydim = 1
    xmin = 65.95[mm]
    xmax = 66.05[mm]
    ymin = -132.202[mm]
    ymax = -115.714[mm]
  v2_bnd_oil_convection_seg_029: Box "框 29b" [comp_v2]
    entitydim = 1
    xmin = 65.95[mm]
    xmax = 66.05[mm]
    ymin = -115.674[mm]
    ymax = -99.187[mm]
  v2_bnd_oil_convection_seg_030: Box "框 30b" [comp_v2]
    entitydim = 1
    xmin = 65.95[mm]
    xmax = 66.05[mm]
    ymin = -99.147[mm]
    ymax = -82.659[mm]
  v2_bnd_oil_convection_seg_031: Box "框 31b" [comp_v2]
    entitydim = 1
    xmin = 65.95[mm]
    xmax = 66.05[mm]
    ymin = -82.619[mm]
    ymax = -66.131[mm]
  v2_bnd_oil_convection_seg_032: Box "框 32b" [comp_v2]
    entitydim = 1
    xmin = 65.95[mm]
    xmax = 66.05[mm]
    ymin = -66.091[mm]
    ymax = -49.603[mm]
  v2_bnd_oil_convection_seg_033: Box "框 33b" [comp_v2]
    entitydim = 1
    xmin = 65.95[mm]
    xmax = 66.05[mm]
    ymin = -49.563[mm]
    ymax = -33.076[mm]
  v2_bnd_oil_convection_seg_034: Box "框 34b" [comp_v2]
    entitydim = 1
    xmin = 65.95[mm]
    xmax = 66.05[mm]
    ymin = -33.036[mm]
    ymax = -16.548[mm]
  v2_bnd_oil_convection_seg_035: Box "框 35b" [comp_v2]
    entitydim = 1
    xmin = 65.95[mm]
    xmax = 66.05[mm]
    ymin = -16.508[mm]
    ymax = -0.02[mm]
  v2_bnd_air_external_convection_explicit: Union "并集" [comp_v2]
    entitydim = 1
    input = {v2_bnd_air_convection_seg_000, v2_bnd_air_convection_seg_001, v2_bnd_air_convection_seg_002, v2_bnd_air_convection_seg_003, v2_bnd_air_convection_seg_004, v2_bnd_air_convection_seg_005, v2_bnd_air_convection_seg_006, v2_bnd_air_convection_seg_007, v2_bnd_air_convection_seg_008, v2_bnd_air_convection_seg_009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}
  v2_bnd_oil_immersed_surface_explicit: Union "并集 2" [comp_v2]
    entitydim = 1
    input = {v2_bnd_oil_convection_seg_000, v2_bnd_oil_convection_seg_001, v2_bnd_oil_convection_seg_002, v2_bnd_oil_convection_seg_003, v2_bnd_oil_convection_seg_004, v2_bnd_oil_convection_seg_005, v2_bnd_oil_convection_seg_006, v2_bnd_oil_convection_seg_007, v2_bnd_oil_convection_seg_008, v2_bnd_oil_convection_seg_009, v2_bnd_oil_convection_seg_010, v2_bnd_oil_convection_seg_011, v2_bnd_oil_convection_seg_012, v2_bnd_oil_convection_seg_013, v2_bnd_oil_convection_seg_014, v2_bnd_oil_convection_seg_015, v2_bnd_oil_convection_seg_016, v2_bnd_oil_convection_seg_017, v2_bnd_oil_convection_seg_018, v2_bnd_oil_convection_seg_019, v2_bnd_oil_convection_seg_020, v2_bnd_oil_convection_seg_021, v2_bnd_oil_convection_seg_022, v2_bnd_oil_convection_seg_023, v2_bnd_oil_convection_seg_024, v2_bnd_oil_convection_seg_025, v2_bnd_oil_convection_seg_026, v2_bnd_oil_convection_seg_027, v2_bnd_oil_convection_seg_028, v2_bnd_oil_convection_seg_029, v2_bnd_oil_convection_seg_030, v2_bnd_oil_convection_seg_031, v2_bnd_oil_convection_seg_032, v2_bnd_oil_convection_seg_033, v2_bnd_oil_convection_seg_034, v2_bnd_oil_convection_seg_035}
  v2_thermal_solid_domains: Box "框 86" [comp_v2]
    entitydim = 2
    xmin = r_hollow-0.1[mm]
    xmax = r_flange+0.1[mm]
    ymin = -oil_len-1[mm]
    ymax = air_len+1[mm]
    condition = inside
  v2_surrounding_air_main_domain: Box "框 87" [comp_v2]
    entitydim = 2
    xmin = r_housing-0.1[mm]
    xmax = r_far+1[mm]
    ymin = flange_t/2-0.1[mm]
    ymax = L1_ext+1[mm]
    condition = inside
  v2_surrounding_air_terminal_domain: Box "框 88" [comp_v2]
    entitydim = 2
    xmin = r_terminal-0.1[mm]
    xmax = r_far+1[mm]
    ymin = L1_ext-0.1[mm]
    ymax = air_len+1[mm]
    condition = inside
  v2_surrounding_oil_main_domain: Box "框 89" [comp_v2]
    entitydim = 2
    xmin = r_rip-0.1[mm]
    xmax = r_far+1[mm]
    ymin = -oil_len-1[mm]
    ymax = -L4_flange/2+0.1[mm]
    condition = inside
  v2_surrounding_oil_near_flange_domain: Box "框 90" [comp_v2]
    entitydim = 2
    xmin = r_flange-0.1[mm]
    xmax = r_far+1[mm]
    ymin = -L4_flange/2-0.1[mm]
    ymax = L4_flange/2+0.1[mm]
    condition = inside
  pv_center_conductor: Box "框 91" [comp_v2_cad_solid_preview]
    entitydim = 2
    xmin = r_hollow-0.2[mm]
    xmax = r_conductor_outer+0.2[mm]
    ymin = -oil_len-1[mm]
    ymax = air_len+1[mm]
  pv_inner_conduit_or_hollow_region: Box "框 92" [comp_v2_cad_solid_preview]
    entitydim = 2
    xmin = -0.2[mm]
    xmax = r_hollow+0.2[mm]
    ymin = -oil_len-1[mm]
    ymax = air_len+1[mm]
  pv_rip_capacitor_core: Box "框 93" [comp_v2_cad_solid_preview]
    entitydim = 2
    xmin = r_conductor_outer-0.2[mm]
    xmax = r_rip+0.2[mm]
    ymin = -oil_len-1[mm]
    ymax = L1_ext+1[mm]
  pv_condenser_screens: Box "框 94" [comp_v2_cad_solid_preview]
    entitydim = 2
    xmin = r_screen_start-1[mm]
    xmax = 60[mm]
    ymin = -576[mm]
    ymax = 576[mm]
  pv_silicone_rubber_external_insulation: Box "框 95" [comp_v2_cad_solid_preview]
    entitydim = 2
    xmin = r_rip-0.2[mm]
    xmax = r_body+0.2[mm]
    ymin = -1[mm]
    ymax = L1_ext+1[mm]
  pv_air_side_sheds_or_equivalent_envelope: Box "框 96" [comp_v2_cad_solid_preview]
    entitydim = 2
    xmin = r_body-0.2[mm]
    xmax = r_housing+0.2[mm]
    ymin = -1[mm]
    ymax = L1_ext+1[mm]
  pv_flange_grounded_metal: Box "框 97" [comp_v2_cad_solid_preview]
    entitydim = 2
    xmin = r_rip-0.2[mm]
    xmax = r_flange+0.2[mm]
    ymin = -L4_flange/2-1[mm]
    ymax = L4_flange/2+1[mm]
  pv_oil_side_core: Box "框 98" [comp_v2_cad_solid_preview]
    entitydim = 2
    xmin = r_conductor_outer-0.2[mm]
    xmax = r_rip+0.2[mm]
    ymin = -oil_len-1[mm]
    ymax = 1[mm]
  pv_oil_side_shield_or_tapered_region: Box "框 99" [comp_v2_cad_solid_preview]
    entitydim = 2
    xmin = r_hollow-0.2[mm]
    xmax = r_rip+0.2[mm]
    ymin = -oil_len-1[mm]
    ymax = 1[mm]
  pv_terminal_connector_region: Box "框 100" [comp_v2_cad_solid_preview]
    entitydim = 2
    xmin = -0.2[mm]
    xmax = r_terminal+0.2[mm]
    ymin = L1_ext-1[mm]
    ymax = L1_ext+terminal_a1+1[mm]
  pv_contact_resistance_heat_source_layer: Box "框 101" [comp_v2_cad_solid_preview]
    entitydim = 2
    xmin = r_hollow-0.2[mm]
    xmax = r_conductor_outer+0.2[mm]
    ymin = L1_ext-1[mm]
    ymax = L1_ext+terminal_a1+1[mm]
  pv_screen_S00: Box "框 102" [comp_v2_cad_solid_preview]
    entitydim = 2
    xmin = 34.7[mm]
    xmax = 37.3[mm]
    ymin = -576.0[mm]
    ymax = 576.0[mm]
  pv_bnd_screen_S00_floating: Box "框 103" [comp_v2_cad_solid_preview]
    entitydim = 1
    xmin = 34.8[mm]
    xmax = 35.2[mm]
    ymin = -576.0[mm]
    ymax = 576.0[mm]
  pv_screen_S01: Box "框 1d" [comp_v2_cad_solid_preview]
    entitydim = 2
    xmin = 36.95[mm]
    xmax = 39.55[mm]
    ymin = -576.0[mm]
    ymax = 576.0[mm]
  pv_bnd_screen_S01_floating: Box "框 104" [comp_v2_cad_solid_preview]
    entitydim = 1
    xmin = 37.05[mm]
    xmax = 37.45[mm]
    ymin = -576.0[mm]
    ymax = 576.0[mm]
  pv_screen_S02: Box "框 2e" [comp_v2_cad_solid_preview]
    entitydim = 2
    xmin = 39.2[mm]
    xmax = 41.8[mm]
    ymin = -576.0[mm]
    ymax = 576.0[mm]
  pv_bnd_screen_S02_floating: Box "框 105" [comp_v2_cad_solid_preview]
    entitydim = 1
    xmin = 39.3[mm]
    xmax = 39.7[mm]
    ymin = -576.0[mm]
    ymax = 576.0[mm]
  pv_screen_S03: Box "框 3e" [comp_v2_cad_solid_preview]
    entitydim = 2
    xmin = 41.45[mm]
    xmax = 44.05[mm]
    ymin = -576.0[mm]
    ymax = 576.0[mm]
  pv_bnd_screen_S03_floating: Box "框 106" [comp_v2_cad_solid_preview]
    entitydim = 1
    xmin = 41.55[mm]
    xmax = 41.95[mm]
    ymin = -576.0[mm]
    ymax = 576.0[mm]
  pv_screen_S04: Box "框 4e" [comp_v2_cad_solid_preview]
    entitydim = 2
    xmin = 43.7[mm]
    xmax = 46.3[mm]
    ymin = -576.0[mm]
    ymax = 576.0[mm]
  pv_bnd_screen_S04_floating: Box "框 107" [comp_v2_cad_solid_preview]
    entitydim = 1
    xmin = 43.8[mm]
    xmax = 44.2[mm]
    ymin = -576.0[mm]
    ymax = 576.0[mm]
  pv_screen_S05: Box "框 5e" [comp_v2_cad_solid_preview]
    entitydim = 2
    xmin = 45.95[mm]
    xmax = 48.55[mm]
    ymin = -551.0[mm]
    ymax = 551.0[mm]
  pv_bnd_screen_S05_floating: Box "框 108" [comp_v2_cad_solid_preview]
    entitydim = 1
    xmin = 46.05[mm]
    xmax = 46.45[mm]
    ymin = -551.0[mm]
    ymax = 551.0[mm]
  pv_screen_S06: Box "框 6e" [comp_v2_cad_solid_preview]
    entitydim = 2
    xmin = 48.2[mm]
    xmax = 50.8[mm]
    ymin = -506.0[mm]
    ymax = 506.0[mm]
  pv_bnd_screen_S06_floating: Box "框 109" [comp_v2_cad_solid_preview]
    entitydim = 1
    xmin = 48.3[mm]
    xmax = 48.7[mm]
    ymin = -506.0[mm]
    ymax = 506.0[mm]
  pv_screen_S07: Box "框 7e" [comp_v2_cad_solid_preview]
    entitydim = 2
    xmin = 50.45[mm]
    xmax = 53.05[mm]
    ymin = -461.0[mm]
    ymax = 461.0[mm]
  pv_bnd_screen_S07_floating: Box "框 110" [comp_v2_cad_solid_preview]
    entitydim = 1
    xmin = 50.55[mm]
    xmax = 50.95[mm]
    ymin = -461.0[mm]
    ymax = 461.0[mm]
  pv_screen_S08: Box "框 8e" [comp_v2_cad_solid_preview]
    entitydim = 2
    xmin = 52.7[mm]
    xmax = 55.3[mm]
    ymin = -416.0[mm]
    ymax = 416.0[mm]
  pv_bnd_screen_S08_floating: Box "框 111" [comp_v2_cad_solid_preview]
    entitydim = 1
    xmin = 52.8[mm]
    xmax = 53.2[mm]
    ymin = -416.0[mm]
    ymax = 416.0[mm]
  pv_screen_S09: Box "框 9e" [comp_v2_cad_solid_preview]
    entitydim = 2
    xmin = 54.95[mm]
    xmax = 57.55[mm]
    ymin = -371.0[mm]
    ymax = 371.0[mm]
  pv_bnd_screen_S09_floating: Box "框 112" [comp_v2_cad_solid_preview]
    entitydim = 1
    xmin = 55.05[mm]
    xmax = 55.45[mm]
    ymin = -371.0[mm]
    ymax = 371.0[mm]
  pv_screen_S10: Box "框 10e" [comp_v2_cad_solid_preview]
    entitydim = 2
    xmin = 57.2[mm]
    xmax = 59.8[mm]
    ymin = -326.0[mm]
    ymax = 326.0[mm]
  pv_bnd_screen_S10_floating: Box "框 113" [comp_v2_cad_solid_preview]
    entitydim = 1
    xmin = 57.3[mm]
    xmax = 57.7[mm]
    ymin = -326.0[mm]
    ymax = 326.0[mm]
  pv_bnd_axisymmetry: Box "框 114" [comp_v2_cad_solid_preview]
    entitydim = 1
    xmin = -0.1[mm]
    xmax = 0.1[mm]
    ymin = -oil_len-1[mm]
    ymax = air_len+1[mm]
  pv_bnd_S00_fixed_72p75kV_rms: Box "框 115" [comp_v2_cad_solid_preview]
    entitydim = 1
    xmin = 34.8[mm]
    xmax = 35.2[mm]
    ymin = -575[mm]
    ymax = 575[mm]
  pv_bnd_S10_ground_0V: Box "框 116" [comp_v2_cad_solid_preview]
    entitydim = 1
    xmin = 57.3[mm]
    xmax = 57.7[mm]
    ymin = -326[mm]
    ymax = 326[mm]
  pv_bnd_flange_ground: Box "框 117" [comp_v2_cad_solid_preview]
    entitydim = 1
    xmin = r_rip-0.2[mm]
    xmax = r_flange+0.2[mm]
    ymin = -L4_flange/2-1[mm]
    ymax = L4_flange/2+1[mm]
  pv_bnd_external_solid_surface: Box "框 118" [comp_v2_cad_solid_preview]
    entitydim = 1
    xmin = r_body-1[mm]
    xmax = r_housing+1[mm]
    ymin = -oil_len-1[mm]
    ymax = L1_ext+1[mm]

Couplings
  maxop_T_all: Maximum "最大值" on all domains
  maxop_T_conductor: Maximum "最大值 2" on selection v2_center_conductor_joule_lower
  maxop_T_rip: Maximum "最大值 3" on selection v2_rip_capacitor_core_strict
  maxop_T_contact: Maximum "最大值 4" on selection v2_contact_resistance_heat_source_layer_strict
  maxop_T_flange: Maximum "最大值 5" on selection v2_flange_grounded_metal_strict
  maxop_T_silicone: Maximum "最大值 6" on selection v2_silicone_rubber_external_insulation_strict
  maxop_E_all: Maximum "最大值 7" on all domains
  maxop_E_rip: Maximum "最大值 8" on selection v2_rip_capacitor_core_strict
  maxop_E_screen_probe: Maximum "最大值 9" on selection v2_condenser_screens

Geometry
  geom_v1 "几何 1" [comp_v1] (2D axisymmetric, length unit m)
    g_surrounding_air_domain: Rectangle "矩形" | pos = {r_housing, flange_t/2}; size = {r_far-r_housing, L1_ext-flange_t/2}
    g_air_above_terminal: Rectangle "矩形 2" | pos = {r_terminal, L1_ext}; size = {r_far-r_terminal, air_len-L1_ext}
    g_surrounding_oil_domain: Rectangle "矩形 3" | pos = {r_rip, -oil_len}; size = {r_far-r_rip, oil_len-L4_flange/2}
    g_surrounding_oil_domain_near_flange: Rectangle "矩形 4"
      pos = {r_flange, -L4_flange/2}
      size = {r_far-r_flange, L4_flange/2}
    g_inner_conduit_or_hollow_region: Rectangle "矩形 5" | pos = {0, -oil_len}; size = {r_hollow, oil_len+air_len}
    g_center_conductor_main: Rectangle "矩形 6"
      pos = {r_hollow, -oil_len}
      size = {r_conductor_outer-r_hollow, oil_len+L1_ext}
    g_contact_resistance_heat_source_layer: Rectangle "矩形 7"
      pos = {r_hollow, L1_ext}
      size = {r_conductor_outer-r_hollow, terminal_a1}
    g_center_conductor_upper: Rectangle "矩形 8"
      pos = {r_hollow, L1_ext+terminal_a1}
      size = {r_conductor_outer-r_hollow, air_len-L1_ext-terminal_a1}
    g_terminal_connector_region: Rectangle "矩形 9"
      pos = {r_conductor_outer, L1_ext}
      size = {r_terminal-r_conductor_outer, terminal_a1}
    g_rip_capacitor_core: Rectangle "矩形 10"
      pos = {r_conductor_outer, -oil_len}
      size = {r_rip-r_conductor_outer, oil_len+L1_ext}
    g_screen_S00: Rectangle "矩形 11" | pos = {35.0[mm], -575.0[mm]}; size = {screen_th, 1150.0[mm]}
    g_screen_S01: Rectangle "矩形 1" | pos = {37.25[mm], -575.0[mm]}; size = {screen_th, 1150.0[mm]}
    g_screen_S02: Rectangle "矩形 2a" | pos = {39.5[mm], -575.0[mm]}; size = {screen_th, 1150.0[mm]}
    g_screen_S03: Rectangle "矩形 3a" | pos = {41.75[mm], -575.0[mm]}; size = {screen_th, 1150.0[mm]}
    g_screen_S04: Rectangle "矩形 4a" | pos = {44.0[mm], -575.0[mm]}; size = {screen_th, 1150.0[mm]}
    g_screen_S05: Rectangle "矩形 5a" | pos = {46.25[mm], -550.0[mm]}; size = {screen_th, 1100.0[mm]}
    g_screen_S06: Rectangle "矩形 6a" | pos = {48.5[mm], -505.0[mm]}; size = {screen_th, 1010.0[mm]}
    g_screen_S07: Rectangle "矩形 7a" | pos = {50.75[mm], -460.0[mm]}; size = {screen_th, 920.0[mm]}
    g_screen_S08: Rectangle "矩形 8a" | pos = {53.0[mm], -415.0[mm]}; size = {screen_th, 830.0[mm]}
    g_screen_S09: Rectangle "矩形 9a" | pos = {55.25[mm], -370.0[mm]}; size = {screen_th, 740.0[mm]}
    g_screen_S10: Rectangle "矩形 10a" | pos = {57.5[mm], -325.0[mm]}; size = {screen_th, 650.0[mm]}
    g_silicone_rubber_external_insulation: Rectangle "矩形 12"
      pos = {r_rip, L4_flange/2}
      size = {r_body-r_rip, L1_ext-L4_flange/2}
    g_air_side_sheds_or_equivalent_envelope: Rectangle "矩形 13" | pos = {r_body, 0}; size = {r_housing-r_body, L1_ext}
    g_air_side_step_lower: Rectangle "矩形 14" | pos = {95[mm], 0}; size = {r_housing-95[mm], 280[mm]}
    g_air_side_step_upper: Rectangle "矩形 15" | pos = {95[mm], 870[mm]}; size = {r_housing-95[mm], 280[mm]}
    g_flange_grounded_metal_disk: Rectangle "矩形 16" | pos = {r_rip, -flange_t/2}; size = {r_flange-r_rip, flange_t}
    g_flange_grounded_metal_neck: Rectangle "矩形 17" | pos = {r_rip, -L4_flange/2}; size = {r_flange_neck-r_rip, L4_flange}
    g_oil_side_shield_or_tapered_region_1: Rectangle "矩形 1a"
      pos = {r_oil_tip, -oil_len}
      size = {r_rip-r_oil_tip, 180[mm]}
    g_oil_side_shield_or_tapered_region_2: Rectangle "矩形 2b" | pos = {52[mm], -415[mm]}; size = {r_rip-52[mm], 170[mm]}
    g_oil_side_shield_or_tapered_region_3: Rectangle "矩形 3b" | pos = {58[mm], -245[mm]}; size = {r_rip-58[mm], 145[mm]}
    fin: Finalize "形成联合体"
  geom_v2 "几何 2" [comp_v2] (2D axisymmetric, length unit m)
    g_surrounding_air_domain: Rectangle "矩形" | pos = {r_housing, flange_t/2}; size = {r_far-r_housing, L1_ext-flange_t/2}
    g_air_above_terminal: Rectangle "矩形 2" | pos = {r_terminal, L1_ext}; size = {r_far-r_terminal, air_len-L1_ext}
    g_surrounding_oil_domain: Rectangle "矩形 3" | pos = {r_rip, -oil_len}; size = {r_far-r_rip, oil_len-L4_flange/2}
    g_surrounding_oil_domain_near_flange: Rectangle "矩形 4"
      pos = {r_flange, -L4_flange/2}
      size = {r_far-r_flange, L4_flange/2}
    g_inner_conduit_or_hollow_region: Rectangle "矩形 5" | pos = {0, -oil_len}; size = {r_hollow, oil_len+air_len}
    g_center_conductor_main: Rectangle "矩形 6"
      pos = {r_hollow, -oil_len}
      size = {r_conductor_outer-r_hollow, oil_len+L1_ext}
    g_contact_resistance_heat_source_layer: Rectangle "矩形 7"
      pos = {r_hollow, L1_ext}
      size = {r_conductor_outer-r_hollow, terminal_a1}
    g_center_conductor_upper: Rectangle "矩形 8"
      pos = {r_hollow, L1_ext+terminal_a1}
      size = {r_conductor_outer-r_hollow, air_len-L1_ext-terminal_a1}
    g_terminal_connector_region: Rectangle "矩形 9"
      pos = {r_conductor_outer, L1_ext}
      size = {r_terminal-r_conductor_outer, terminal_a1}
    g_rip_capacitor_core: Rectangle "矩形 10"
      pos = {r_conductor_outer, -oil_len}
      size = {r_rip-r_conductor_outer, oil_len+L1_ext}
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    fin: Finalize "形成联合体"
  geom_preview "几何" [comp_v2_cad_solid_preview] (2D axisymmetric, length unit m)
    g_inner_conduit_or_hollow_region: Rectangle "矩形" | pos = {0, -oil_len}; size = {r_hollow, oil_len+air_len}
    g_center_conductor_main: Rectangle "矩形 2"
      pos = {r_hollow, -oil_len}
      size = {r_conductor_outer-r_hollow, oil_len+L1_ext}
    g_contact_resistance_heat_source_layer: Rectangle "矩形 3"
      pos = {r_hollow, L1_ext}
      size = {r_conductor_outer-r_hollow, terminal_a1}
    g_center_conductor_upper: Rectangle "矩形 4"
      pos = {r_hollow, L1_ext+terminal_a1}
      size = {r_conductor_outer-r_hollow, air_len-L1_ext-terminal_a1}
    g_terminal_connector_region: Rectangle "矩形 5"
      pos = {r_conductor_outer, L1_ext}
      size = {r_terminal-r_conductor_outer, terminal_a1}
    g_rip_capacitor_core: Rectangle "矩形 6"
      pos = {r_conductor_outer, -oil_len}
      size = {r_rip-r_conductor_outer, oil_len+L1_ext}
    g_screen_S00: Rectangle "矩形 7" | pos = {35.0[mm], -575.0[mm]}; size = {screen_th, 1150.0[mm]}
    g_screen_S01: Rectangle "矩形 1" | pos = {37.25[mm], -575.0[mm]}; size = {screen_th, 1150.0[mm]}
    g_screen_S02: Rectangle "矩形 2a" | pos = {39.5[mm], -575.0[mm]}; size = {screen_th, 1150.0[mm]}
    g_screen_S03: Rectangle "矩形 3a" | pos = {41.75[mm], -575.0[mm]}; size = {screen_th, 1150.0[mm]}
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    fin: Finalize "形成联合体"

Materials
  mat_default: Common "Default numerical background" [comp_v2] on all domains
    def "基本"
      thermalconductivity = 0.20[W/(m*K)]
      density = 1200[kg/m^3]
      heatcapacity = 1000[J/(kg*K)]
      relpermittivity = 1
      electricconductivity = 1e-15[S/m]
  mat_cu: Common "Copper conductor" [comp_v2] on selection v2_center_conductor
    def "基本"
      thermalconductivity = 400[W/(m*K)]
      density = 8960[kg/m^3]
      heatcapacity = 385[J/(kg*K)]
      relpermittivity = 1
      electricconductivity = sigma_cu_20/(1+alpha_cu*(T-293.15[K]))
  mat_rip: Common "RIP capacitor core" [comp_v2] on selection v2_rip_capacitor_core
    def "基本"
      thermalconductivity = 0.20[W/(m*K)]
      density = 2210[kg/m^3]
      heatcapacity = 730[J/(kg*K)]
      relpermittivity = epsr_rip
      electricconductivity = sigma_rip
  mat_sir: Common "Silicone rubber housing" [comp_v2] on selection v2_silicone_rubber_external_insulation
    def "基本"
      thermalconductivity = 0.20[W/(m*K)]
      density = 2200[kg/m^3]
      heatcapacity = 703[J/(kg*K)]
      relpermittivity = 3.75
      electricconductivity = 1e-14[S/m]
  mat_flange: Common "Grounded metal/flange" [comp_v2] on selection v2_flange_grounded_metal
    def "基本"
      thermalconductivity = 45[W/(m*K)]
      density = 7850[kg/m^3]
      heatcapacity = 460[J/(kg*K)]
      relpermittivity = 1
      electricconductivity = 1e6[S/m]
  mat_air_main: Common "Surrounding air main" [comp_v2] on selection v2_surrounding_air_main_domain
    def "基本"
      thermalconductivity = 0.026[W/(m*K)]
      density = 1.2[kg/m^3]
      heatcapacity = 1005[J/(kg*K)]
      relpermittivity = 1
      electricconductivity = 1e-15[S/m]
  mat_air_terminal: Common "Surrounding air above terminal" [comp_v2] on selection v2_surrounding_air_terminal_domain
    // same settings as mat_air_main
  mat_oil_main: Common "Transformer oil main" [comp_v2] on selection v2_surrounding_oil_main_domain
    def "基本"
      thermalconductivity = 0.12[W/(m*K)]
      density = 850[kg/m^3]
      heatcapacity = 1900[J/(kg*K)]
      relpermittivity = 2.2
      electricconductivity = 1e-12[S/m]
  mat_oil_near_flange: Common "Transformer oil near flange" [comp_v2] on selection v2_surrounding_oil_near_flange_domain
    // same settings as mat_oil_main
  mat_screen: Common "Aluminum condenser screens" [comp_v2] on selection v2_condenser_screens
    def "基本"
      thermalconductivity = 205[W/(m*K)]
      density = 2700[kg/m^3]
      heatcapacity = 900[J/(kg*K)]
      relpermittivity = 1
      electricconductivity = 3.5e7[S/m]

Physics
  es: Electrostatics "静电" [geom_v2] on all domains
    dependent variable V
    ccn1: ChargeConservation "电荷守恒 1" (default)
    axi1: AxialSymmetry "轴对称 1" (default)
    zc1: ZeroCharge "零电荷 1" (default)
    init1: init "初始值 1" (default)
    pot_s00: ElectricPotential "电势" on selection v2_bnd_S00_fixed_72p75kV_rms | V0 = Vcase
    gnd_s10: Ground "接地 10" on selection v2_bnd_S10_ground_0V
    gnd_flange: Ground "接地" on selection v2_bnd_flange_ground
    fp_s01: FloatingPotential "悬浮电位 1" on selection v2_bnd_screen_S01_floating | Q0 = 0[C]
    fp_s02: FloatingPotential "悬浮电位 2" on selection v2_bnd_screen_S02_floating | Q0 = 0[C]
    fp_s03: FloatingPotential "悬浮电位 3" on selection v2_bnd_screen_S03_floating | Q0 = 0[C]
    fp_s04: FloatingPotential "悬浮电位 4" on selection v2_bnd_screen_S04_floating | Q0 = 0[C]
    fp_s05: FloatingPotential "悬浮电位 5" on selection v2_bnd_screen_S05_floating | Q0 = 0[C]
    fp_s06: FloatingPotential "悬浮电位 6" on selection v2_bnd_screen_S06_floating | Q0 = 0[C]
    fp_s07: FloatingPotential "悬浮电位 7" on selection v2_bnd_screen_S07_floating | Q0 = 0[C]
    fp_s08: FloatingPotential "悬浮电位 8" on selection v2_bnd_screen_S08_floating | Q0 = 0[C]
    fp_s09: FloatingPotential "悬浮电位 9" on selection v2_bnd_screen_S09_floating | Q0 = 0[C]
  ht: HeatTransfer "固体传热" [geom_v2] on selection v2_thermal_solid_domains
    dependent variable T
    solid1: SolidHeatTransferModel "固体 1" (default)
    init1: init "初始值 1" (default)
    axi1: AxialSymmetry "轴对称 1" (default)
    ins1: ThermalInsulation "热绝缘 1" (default)
    hs_cu_lower: HeatSource "热源" on selection v2_center_conductor_joule_lower
      Q0 = Icase^2*(1/sigma_cu_20)*(1+alpha_cu*(T-293.15[K]))/(pi*(r_conductor_outer^2-r_hollow^2))^2
    hs_cu_upper: HeatSource "热源 2" on selection v2_center_conductor_joule_upper
      Q0 = Icase^2*(1/sigma_cu_20)*(1+alpha_cu*(T-293.15[K]))/(pi*(r_conductor_outer^2-r_hollow^2))^2
    hs_contact: HeatSource "热源 3" on selection v2_contact_resistance_heat_source_layer_strict | Q0 = Q_contact_vol
    hs_rip_dielectric: HeatSource "热源 4" on selection v2_rip_capacitor_core_strict
      Q0 = omega0*epsilon0_const*epsr_rip*tan_delta_rip*es.normE^2
    hf_air: HeatFluxBoundary "热通量" on selection v2_bnd_air_external_convection_explicit
      HeatFluxType = ConvectiveHeatFlux
      h = h_air_case
      Text = Tair_case
    hf_oil: HeatFluxBoundary "热通量 2" on selection v2_bnd_oil_immersed_surface_explicit
      HeatFluxType = ConvectiveHeatFlux
      h = h_oil_case
      Text = Toil_case

Mesh
  mesh1 "网格 1" [geom_v2] (physics-controlled)
    size: MeshSizeDefault "大小" | hauto = 9

Studies
  std_es "研究"
    stat: Stationary "稳态" | solve for = {es}
  std_ht "研究 2"
    stat: Stationary "稳态" | solve for = {ht}
  std_cpl "研究 3"
    stat: Stationary "稳态"